<?xml version="1.0" ?>
<!--
  File:     R-4360-Wasp-Major.xml
  Author:   BARANGER Emmanuel avec Aero-Matic v 0.8
  Date:     8 Novembre 2006
  Version   0.2

  Inputs:
    name:           Pratt & Whitney R 4360 Wasp Major
    type:           piston
    power:          3000.0 hp
    augmented?      no
    injected?       no
-->

<piston_engine name="PW-R-4360">

   <minmp> 6.0 </minmp>
   <maxmp> 30.0 </maxmp>
   <displacement> 4800 </displacement>
   <maxhp> 3500.00 </maxhp>			<!-- Plus que le 3000 max de départ -->
   <cycles> 2.0 </cycles>
   <idlerpm> 700.0 </idlerpm>
   <maxthrottle> 1.0 </maxthrottle>
   <minthrottle> 0.2 </minthrottle>

</piston_engine>
